*del,all,,nopr
allsel,all,all

!инициализация рандомайзера
*use,codes\\initial_seed\\rand_init.txt

/prep7

!!
! ВХОДНЫЕ ДАННЫЕ
!!

!отключение лога
/nopr
!отключение немедленной отрисовки при работе через gui
immed,0
!чтение файла с сеткой
/input,ans_input.ans
!включение лога
/gopr

!размер популяции
n_ = 13
!"глубина" мутации
F = 0.5
!вероятность скрещивания
cr = 0.9
!учёт технологических ограничений: 0 - не учитывать, 1 - учитывать
manufc = 1
!тип засева: 0 - детерминированный, 1 - рандомный
seed_mode = 1

!
!@teta - весовой коэффициент для критерия
!Критерий = (1-t) * sigma_max + t*sigma_avg -> MIN,
!где sigma_max - макс. напряжения на линии спая,
!где sigma_avg - средние напряжений на линии спая.
!0 <= teta <= 1.0
!
teta = 0.5

!!
! КОНЕЦ ВХОДНЫХ ДАННЫХ
!!

seed_id = 1

!начальный "засев"
*use,codes\\initial_seed\\init_seed.txt,n_

!запись координат _всех_ узлов
*use,codes\\initial_seed\\write_all_nodes.txt

!выход с сохранением проекта
/exit,all
